@Author Thomas Helfer;
@Date   11/02/2021;
@Description{

};

@ModellingHypothesis 'PlaneStrain';
@Behaviour<generic> '/home/dsiedel/Projects/pythhon/behaviour/finite_strain_isotropic_linear_hardening/src/libBehaviour.so' 'IsotropicLinearHardeningPlasticity';

// external state variable
@ExternalStateVariable 'Temperature' 293.15;

// @ImposedDeformationGradient 'FXX' {
//   0 : 1,
//   1 : 1.007,
//   2 : 0.99,
//   3 : 1.02,
//   4 : 0.97,
//   5 : 1.04
// };

@ImposedDeformationGradient 'FXX' {
  0 : 1,
  1 : '1+7e-3',
  2 : '1-1e-2',
  3 : '1+2e-2',
  4 : '1-3e-2',
  5 : '1+4e-2'
};

//@ImposedDeformationGradient 'FYX' {
//  0 : 1,
//  1 : '1+7e-3',
//  2 : '1-1e-2',
//  3 : '1+2e-2',
//  4 : '1-3e-2',
//  5 : '1+4e-2'
//};

@ImposedDeformationGradient 'FXY' 0.;
@ImposedDeformationGradient 'FYX' 0.;

@Times{0, 5 in 10};
