@Author Thomas Helfer;
@Date   11/02/2021;
@Description{

};

@ModellingHypothesis 'PlaneStrain';
@Behaviour<generic> '../behaviour/src/libBehaviour.so' 'IsotropicLinearHardeningPlasticity';

// external state variable
@ExternalStateVariable 'Temperature' 293.15;

@ImposedStrain 'EXX' {
  0 : 0,
  1 : 7.e-3,
  2 : -1.e-2,
  3 : 2.e-2,
  4 : -3e-2,
  5 : 4e-2
};

//@ImposedStrain 'EXX' {
//  0 : 0,
//  1 : 0.01
//};

//@ImposedStrain 'EXX' {
//  0 : 0,
//  1 : 0.008
//};

@Times{0, 5 in 10};
//@Times{0, 1 in 10};
